*Heading
** Job name: AttwoodCompression-1 Model name: AttwoodCompression-1
** Generated by: Abaqus/CAE 2021
*Preprint, echo=NO, model=NO, history=NO, contact=NO
**
** PARTS
**
*Part, name=L7
*Node
      1, -0.00350000011, -0.00350000011, 0.00100000005
      2, -0.00350000011, -0.00272222213, 0.00100000005
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*Element, type=C3D8R
  1,  51,  52,  62,  61,   1,   2,  12,  11
  2,  52,  53,  63,  62,   2,   3,  13,  12
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*Nset, nset=Set-1, generate
   1,  500,    1
*Elset, elset=Set-1, generate
   1,  324,    1
** Section: L7
*Solid Section, elset=Set-1, material=MATRIX-NEOHOOKE
,
*End Part
**
*Part, name=Fibers0
*Node
      1,     -0.003485,     -0.003500,      0.000015
      2,     -0.003485,      0.003500,      0.000015
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*Element, type=T3D2
1, 1, 2
2, 3, 4
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*Nset, nset=Fib0, internal, generate
1, 2380, 1
*Elset, elset=Fib0, internal, generate
1, 1191, 1
**Section: TrussSection
*Solid Section, elset=Fib0, material=Fibers
2.723761E-09,
*End Part
**
*Part, name=Fibers90
*Node
      1,     -0.003500,     -0.003485,      0.000125
      2,      0.003500,     -0.003485,      0.000125
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*Element, type=T3D2
1, 1, 2
2, 3, 4
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*Nset, nset=Fib90, internal, generate
1, 1904, 1
*Elset, elset=Fib90, internal, generate
1, 953, 1
**Section: TrussSection
*Solid Section, elset=Fib90, material=Fibers
2.723761E-09,
*End Part
**
**
** ASSEMBLY
**
*Assembly, name=Assembly
**
*Instance, name=L7-1, part=L7
*End Instance
**
*Instance, name=Fibers0, part=Fibers0
0.000000E+00, 0.000000E+00, 0.000000E+00
*End Instance
**
*Instance, name=Fibers90, part=Fibers90
0.000000E+00, 0.000000E+00, 0.000000E+00
*End Instance
*Nset, nset=ALLFIBERS, instance=FIBERS0, generate
1, 2380, 1
*Nset, nset=ALLFIBERS, instance=FIBERS90, generate
1, 1904, 1
*Elset, elset=ALLFIBERS, instance=FIBERS0, generate
1, 1191, 1
*Elset, elset=ALLFIBERS, instance=FIBERS90, generate
1, 953, 1
**
*Nset, nset=Compress, instance=L7-1
   1,   2,   3,   4,   5,   6
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*Elset, elset=Compress, instance=L7-1
   1,   2,   3,   4,   5,   6
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*Nset, nset=Fixed, instance=L7-1
  41,  42,  43,  44,  45,  46
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*Elset, elset=Fixed, instance=L7-1
  28,  29,  30,  31,  32,  33
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*Nset, nset=Host, instance=L7-1, generate
   1,  500,    1
*Elset, elset=Host, instance=L7-1, generate
   1,  324,    1
*Nset, nset=Outside, instance=L7-1, generate
   1,  500,    1
*Elset, elset=Outside, instance=L7-1, generate
   1,  324,    1
** Constraint: Embed-1
*Embedded Element, host elset=HOST
ALLFIBERS
*End Assembly
*Amplitude, name=Ramp
             0.,              0.,             0.1,              1.
**
** MATERIALS
**
*Material, name=FIBERS
*Density
981.,
*Elastic
 1.3e+11, 0.49
*Material, name=MATRIX-NEOHOOKE
*Density
1100.,
*Hyperelastic, neo hooke
 2.1154e+08, 2.182e-09
*Material, name=NEOHOOKE
*Density
 7.8e+09,
*Hyperelastic, neo hooke
 3.846e+10, 1.1999e-11
**
** BOUNDARY CONDITIONS
**
** Name: Fixed Type: Displacement/Rotation
*Boundary
Fixed, 3, 3
** ----------------------------------------------------------------
**
** STEP: Step-1
**
*Step, name=Step-1, nlgeom=YES
*Dynamic, Explicit
, 0.1
*Bulk Viscosity
0.06, 1.2
**
** BOUNDARY CONDITIONS
**
** Name: Disp Type: Displacement/Rotation
*Boundary, amplitude=Ramp
Compress, 3, 3, -0.00033
**
** OUTPUT REQUESTS
**
*Restart, write, number interval=1, time marks=NO
**
** FIELD OUTPUT: F-Output-1
**
*Output, field, number interval=100
*Node Output
A, RF, U, V
*Element Output, directions=YES
ER, EVF, LE, PE, PEEQ, PEEQVAVG, PEVAVG, S, SVAVG
*Contact Output
CSTRESS,
**
** HISTORY OUTPUT: H-Output-1
**
*Output, history, variable=PRESELECT, time interval=0.001
*End Step
