*Heading
** Job name: BeamBendTest_Fibers Model name: BeamBendTest_Fibers
** Generated by: Abaqus/CAE 2021
*Preprint, echo=NO, model=NO, history=NO, contact=NO
**
** PARTS
**
*Part, name=BEAM
*Node
      1,  0.109999999,           0.,           0.
      2,  0.109999999,           0., 0.0199999996
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*Element, type=C3D8R
 1,  86, 169, 181, 137,   1,  17, 105,  50
 2, 169,  88, 153, 181,  17,   2,  18, 105
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*Nset, nset=SET-1, generate
   1,  198,    1
*Elset, elset=SET-1, generate
  1,  84,   1
** Section: Section-1-SET-1
*Solid Section, elset=SET-1, material=NEOHOOKE
,
*End Part
**
*Part, name=FIBERS0
*Node
      1, 0.00153799995,           0., 0.000991999987
      2, 0.00153799995, 0.00600000005, 0.000991999987
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*Element, type=T3D2
 1,   1,   2
 2,   3,   4
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*Nset, nset=FIB0, generate
   1,  180,    1
*Elset, elset=FIB0, generate
  1,  90,   1
** Section: Section-2-FIB0
*Solid Section, elset=FIB0, material=FIBERS
9.0792e-06,
*End Part
**
*Part, name=FIBERS90
*Node
      1,           0., 7.6999997e-05, 0.00495800003
      2, 0.0199999996, 7.6999997e-05, 0.00495800003
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*Element, type=T3D2
 1,  1,  2
 2,  2,  3
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*Nset, nset=FIB90, generate
  1,  28,   1
*Elset, elset=FIB90, generate
  1,  24,   1
** Section: Section-3-FIB90
*Solid Section, elset=FIB90, material=FIBERS
9.0792e-06,
*End Part
**
**
** ASSEMBLY
**
*Assembly, name=Assembly
**
*Instance, name=BEAM-1, part=BEAM
          0.,           0.,        0.006
          0.,           0.,        0.006,          -1.,           0.,        0.006,          90.
*End Instance
**
*Instance, name=FIBERS0, part=FIBERS0
          0.,           0.,        0.006
          0.,           0.,        0.006,          -1.,           0.,        0.006,          90.
*End Instance
**
*Instance, name=FIBERS90, part=FIBERS90
          0.,           0.,        0.006
          0.,           0.,        0.006,          -1.,           0.,        0.006,          90.
*End Instance
**
*Nset, nset=ALLFIBERS, instance=FIBERS0, generate
   1,  180,    1
*Nset, nset=ALLFIBERS, instance=FIBERS90, generate
  1,  28,   1
*Elset, elset=ALLFIBERS, instance=FIBERS0, generate
  1,  90,   1
*Elset, elset=ALLFIBERS, instance=FIBERS90, generate
  1,  24,   1
*Nset, nset=CLAMP, instance=BEAM-1
   3,   4,   6,   7,   9,  10
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*Elset, elset=CLAMP, instance=BEAM-1, generate
 69,  76,   1
*Nset, nset=DISP, instance=BEAM-1
  1,  2, 17
*Elset, elset=DISP, instance=BEAM-1
  1,  2, 82, 84
*Nset, nset=HOST, instance=BEAM-1, generate
   1,  198,    1
*Elset, elset=HOST, instance=BEAM-1, generate
  1,  84,   1
*Nset, nset=OUTSIDE, instance=BEAM-1
   1,   2,   3,   4,   5,   6
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*Elset, elset=OUTSIDE, instance=BEAM-1, generate
  1,  84,   1
** Constraint: Embed-1
*Embedded Element, host elset=HOST
ALLFIBERS
*End Assembly
*Amplitude, name=RAMP
             0.,              0.,            0.01,              1.
**
** MATERIALS
**
*Material, name=FIBERS
*Density
7800.,
*Elastic
 2e+11, 0.3
*Material, name=NEOHOOKE
*Density
7800.,
*Hyperelastic, neo hooke
 3.846e+10, 1.1999e-11
**
** BOUNDARY CONDITIONS
**
** Name: Disp-BC-1 Type: Displacement/Rotation
*Boundary
CLAMP, 1, 1
** Name: Disp-BC-2 Type: Displacement/Rotation
*Boundary
CLAMP, 2, 2
** Name: Disp-BC-3 Type: Displacement/Rotation
*Boundary
CLAMP, 3, 3
** ----------------------------------------------------------------
**
** STEP: Step-1
**
*Step, name=Step-1, nlgeom=YES
*Dynamic, Explicit
, 0.01
*Bulk Viscosity
0.06, 1.2
**
** BOUNDARY CONDITIONS
**
** Name: Disp-BC-4 Type: Displacement/Rotation
*Boundary, amplitude=RAMP
DISP, 3, 3, -0.01
**
** OUTPUT REQUESTS
**
*Restart, write, number interval=1, time marks=NO
**
** FIELD OUTPUT: F-Output-1
**
*Output, field, variable=PRESELECT, number interval=200
**
** HISTORY OUTPUT: H-Output-1
**
*Output, history, variable=PRESELECT
*End Step
