*Heading
** Job name: BeamBendTest Model name: Model-1
** Generated by: Abaqus/CAE 2021
*Preprint, echo=NO, model=NO, history=NO, contact=NO
**
** PARTS
**
*Part, name=Beam
*Node
      1,  0.109999999,           0.,           0.
      2,  0.109999999,           0., 0.0199999996
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*Element, type=C3D8R
 1,  86, 169, 181, 137,   1,  17, 105,  50
 2, 169,  88, 153, 181,  17,   2,  18, 105
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*Nset, nset=Set-1, generate
   1,  198,    1
*Elset, elset=Set-1, generate
  1,  84,   1
** Section: NeoHooke
*Solid Section, elset=Set-1, material=NeoHooke
,
*End Part
**
*Part, name=Fibers0
*Node
      1,      0.001538,      0.000000,      0.000351
      2,      0.001538,      0.010000,      0.000351
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*Element, type=T3D2
1, 1, 2
2, 2, 3
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*Nset, nset=Fib0, internal, generate
1, 765, 1
*Elset, elset=Fib0, internal, generate
1, 511, 1
**Section: TrussSection
*Solid Section, elset=Fib0, material=Fibers
1.134900E-06,
*End Part
**
*Part, name=Fibers90
*Node
      1,      0.000000,      0.000256,      0.001753
      2,      0.010000,      0.000256,      0.001753
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*Element, type=T3D2
1, 1, 2
2, 2, 3
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*Nset, nset=Fib90, internal, generate
1, 364, 1
*Elset, elset=Fib90, internal, generate
1, 337, 1
**Section: TrussSection
*Solid Section, elset=Fib90, material=Fibers
1.134900E-06,
*End Part
**
**
** ASSEMBLY
**
*Assembly, name=Assembly
**
*Instance, name=Beam-1, part=Beam
          0.,           0.,        0.006
          0.,           0.,        0.006,          -1.,           0.,        0.006,          90.
*End Instance
**
*Instance, name=Fibers0, part=Fibers0
0.000000E+00, 0.000000E+00, 0.000000E+00
*End Instance
**
*Instance, name=Fibers90, part=Fibers90
0.000000E+00, 0.000000E+00, 0.000000E+00
*End Instance
*Nset, nset=ALLFIBERS, instance=FIBERS0, generate
1, 765, 1
*Nset, nset=ALLFIBERS, instance=FIBERS90, generate
1, 364, 1
*Elset, elset=ALLFIBERS, instance=FIBERS0, generate
1, 511, 1
*Elset, elset=ALLFIBERS, instance=FIBERS90, generate
1, 337, 1
**
*Nset, nset=Clamp, instance=Beam-1
   3,   4,   6,   7,   9,  10
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*Elset, elset=Clamp, instance=Beam-1, generate
 69,  76,   1
*Nset, nset=Disp, instance=Beam-1
  1,  2, 17
*Elset, elset=Disp, instance=Beam-1
  1,  2, 82, 84
*Nset, nset=HOST, instance=Beam-1, generate
   1,  198,    1
*Elset, elset=HOST, instance=Beam-1, generate
  1,  84,   1
*Nset, nset=Outside, instance=Beam-1
   1,   2,   3,   4,   5,   6
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*Elset, elset=Outside, instance=Beam-1, generate
  1,  84,   1
** Constraint: Embed-1
*Embedded Element, host elset=HOST
ALLFIBERS
*End Assembly
*Amplitude, name=Ramp
             0.,              0.,            0.01,              1.
**
** MATERIALS
**
*Material, name=Fibers
*Density
7800.,
*Elastic
 2e+11, 0.3
*Material, name=NeoHooke
*Density
7800.,
*Hyperelastic, neo hooke
 3.846e+10, 1.1999e-11
**
** BOUNDARY CONDITIONS
**
** Name: Clamp Type: Displacement/Rotation
*Boundary
Clamp, 1, 1
Clamp, 2, 2
Clamp, 3, 3
** ----------------------------------------------------------------
**
** STEP: Step-1
**
*Step, name=Step-1, nlgeom=YES
*Dynamic, Explicit
, 0.01
*Bulk Viscosity
0.06, 1.2
**
** BOUNDARY CONDITIONS
**
** Name: Disp Type: Displacement/Rotation
*Boundary, amplitude=Ramp
Disp, 3, 3, -0.01
**
** OUTPUT REQUESTS
**
*Restart, write, number interval=1, time marks=NO
**
** FIELD OUTPUT: F-Output-1
**
*Output, field, variable=PRESELECT, number interval=200
**
** HISTORY OUTPUT: H-Output-1
**
*Output, history, variable=PRESELECT
*End Step
