*Heading
** Job name: AttwoodCompression-2 Model name: AttwoodCompression-2
** Generated by: Abaqus/CAE 2021
*Preprint, echo=NO, model=NO, history=NO, contact=NO
**
** PARTS
**
*Part, name=L7
*Node
      1, -0.00350000011, -0.00350000011, 0.00100000005
      2, -0.00350000011, -0.00308823539, 0.00100000005
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*Element, type=C3D8R
   1,  127,  128,  146,  145,    1,    2,   20,   19
   2,  128,  129,  147,  146,    2,    3,   21,   20
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*Nset, nset=Set-1, generate
    1,  2394,     1
*Elset, elset=Set-1, generate
    1,  1836,     1
** Section: L7
*Solid Section, elset=Set-1, material=NeoHooke
,
*End Part
**
**
** ASSEMBLY
**
*Assembly, name=Assembly
**
*Instance, name=L7-1, part=L7
*End Instance
**
*Nset, nset=Compress, instance=L7-1
    1,    2,    3,    4,    5,    6
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*Elset, elset=Compress, instance=L7-1
    1,    2,    3,    4,    5,    6
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*Nset, nset=Fixed, instance=L7-1
  109,  110,  111,  112,  113,  114
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*Elset, elset=Fixed, instance=L7-1
   86,   87,   88,   89,   90,   91
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*End Assembly
*Amplitude, name=Ramp
             0.,              0.,             0.1,              1.
**
** MATERIALS
**
*Material, name=Fibers
*Density
981.,
*Elastic
 2e+11, 0.3
*Material, name=NeoHooke
*Density
 7.8e+09,
*Hyperelastic, neo hooke
 3.846e+10, 1.1999e-11
**
** BOUNDARY CONDITIONS
**
** Name: Fixed Type: Displacement/Rotation
*Boundary
Fixed, 3, 3
** ----------------------------------------------------------------
**
** STEP: Step-1
**
*Step, name=Step-1, nlgeom=YES
*Dynamic, Explicit
, 0.1
*Bulk Viscosity
0.06, 1.2
**
** BOUNDARY CONDITIONS
**
** Name: Disp Type: Displacement/Rotation
*Boundary, amplitude=Ramp
Compress, 3, 3, -0.0003
**
** OUTPUT REQUESTS
**
*Restart, write, number interval=1, time marks=NO
**
** FIELD OUTPUT: F-Output-1
**
*Output, field, variable=PRESELECT, number interval=100
**
** HISTORY OUTPUT: H-Output-1
**
*Output, history, variable=PRESELECT
*End Step
