*Heading
** Job name: IrregularShape Model name: IrregularShape
** Generated by: Abaqus/CAE 2022
*Preprint, echo=NO, model=NO, history=NO, contact=NO
**
** PARTS
**
*Part, name=Part-1
*Node
      1, -0.0145269996, -0.0168999992, 0.0500000007
      2, -0.0295269992, -0.00190000003, 0.0500000007
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*Element, type=C3D8R
1, 115,  25, 114, 356,  23,   1,  24, 113
2, 114,  27, 116, 356,  24,   2,  26, 113
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*Nset, nset=Set-1, generate
   1,  456,    1
*Elset, elset=Set-1, generate
   1,  270,    1
** Section: Section-1
*Solid Section, elset=Set-1, material=NeoHooke
,
*End Part
**
**
** ASSEMBLY
**
*Assembly, name=Assembly
**
*Instance, name=Part-1-1, part=Part-1
*End Instance
**
*Nset, nset=Disp, instance=Part-1-1
   1,   2,   3,   7,   8,  11
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*Elset, elset=Disp, instance=Part-1-1
   1,   2,   3,   7,   8,   9
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*Nset, nset=Fix, instance=Part-1-1
   4,   5,   6,   9,  10,  13
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*Elset, elset=Fix, instance=Part-1-1, generate
 133,  238,    1
*Nset, nset=HOST, instance=Part-1-1
   1,   2,   3,   4,   5,   6
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*Elset, elset=HOST, instance=Part-1-1
   1,   2,   3,   4,   5,   6
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*Nset, nset=O1, instance=Part-1-1
   1,   2,   3,   4,   5,   6
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*Elset, elset=O1, instance=Part-1-1, generate
   1,  270,    1
*Nset, nset=O2, instance=Part-1-1
   1,   2,   3,   4,   5,   6
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*Elset, elset=O2, instance=Part-1-1
   1,   2,   3,   4,   5,   6
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*Nset, nset=O3, instance=Part-1-1
   1,   2,   3,   4,   5,   6
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*Elset, elset=O3, instance=Part-1-1, generate
   1,  270,    1
*Nset, nset=Outside, instance=Part-1-1
   1,   2,   3,   4,   5,   6
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*Elset, elset=Outside, instance=Part-1-1, generate
   1,  270,    1
*End Assembly
*Amplitude, name=Amp-1
             0.,              0.,           0.001,              1.
**
** MATERIALS
**
*Material, name=FIBERS
*Density
981.,
*Elastic
 2e+08, 0.3
*No Compression
*Material, name=MATRIX
*Density
308.,
*Elastic, type=ORTHOTROPIC
 4.2e+10, 2.4e+09, 4.2e+10, 2.7e+09, 2.7e+09, 4.6e+09,   4e+08,   4e+08
   9e+08,
*Material, name=NeoHooke
*Density
7800.,
*Hyperelastic, neo hooke
 3.846e+10, 1.1999e-11
**
** BOUNDARY CONDITIONS
**
** Name: Fix Type: Displacement/Rotation
*Boundary
Fix, 3, 3
** ----------------------------------------------------------------
**
** STEP: Step-1
**
*Step, name=Step-1, nlgeom=YES
*Dynamic, Explicit
, 0.001
*Bulk Viscosity
0.06, 1.2
**
** BOUNDARY CONDITIONS
**
** Name: Disp Type: Displacement/Rotation
*Boundary, amplitude=Amp-1
Disp, 3, 3, 0.0001
**
** OUTPUT REQUESTS
**
*Restart, write, number interval=1, time marks=NO
**
** FIELD OUTPUT: F-Output-1
**
*Output, field, variable=PRESELECT
**
** HISTORY OUTPUT: H-Output-1
**
*Output, history, variable=PRESELECT
*End Step
