*Heading
** Job name: LiuBeam-6 Model name: Beam-6
** Generated by: Abaqus/CAE 2021
*Preprint, echo=NO, model=NO, history=NO, contact=NO
**
** PARTS
**
*Part, name=Beam
*Node
      1,  0.109999999,           0.,           0.
      2,  0.109999999,           0., 0.0199999996
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*Element, type=C3D8
   1,  266, 1677, 1929,  687,    1,   17,  357,  132
   2, 1677, 1678, 1930, 1929,   17,   18,  358,  357
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*Nset, nset=Set-1, generate
    1,  3575,     1
*Elset, elset=Set-1, generate
    1,  2560,     1
** Section: NeoHooke
*Solid Section, elset=Set-1, material=Elastic
,
*End Part
**
**
** ASSEMBLY
**
*Assembly, name=Assembly
**
*Instance, name=Beam-1, part=Beam
          0.,           0.,        0.006
          0.,           0.,        0.006,          -1.,           0.,        0.006,          90.
*End Instance
**
*Nset, nset=Clamp, instance=Beam-1
    3,    4,    6,    7,    9,   10
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*Elset, elset=Clamp, instance=Beam-1, generate
 2241,  2480,     1
*Nset, nset=Disp, instance=Beam-1
  1,  2, 17, 18, 19
*Elset, elset=Disp, instance=Beam-1
    1,    2,    3,    4, 2530, 2540, 2550, 2560
*Nset, nset=HOST, instance=Beam-1, generate
    1,  3575,     1
*Elset, elset=HOST, instance=Beam-1, generate
    1,  2560,     1
*Nset, nset=Outside, instance=Beam-1
    1,    2,    3,    4,    5,    6
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*Elset, elset=Outside, instance=Beam-1
    1,    2,    3,    4,    5,    6
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*Nset, nset=Set-6, instance=Beam-1
 1, 2
*End Assembly
*Amplitude, name=Ramp
             0.,              0.,            0.25,              1.
**
** MATERIALS
**
*Material, name=Elastic
*Density
 7.8e+07,
*Elastic
 2e+11, 0.3
*Material, name=Fibers
*Density
981.,
*Elastic
 1.3e+11, 0.49
*Material, name=Matrix-NeoHooke
*Density
1100.,
*Hyperelastic, neo hooke
 2.1154e+08, 2.182e-09
*Material, name=NeoHooke
*Density
 7.8e+07,
*Hyperelastic, neo hooke
 3.846e+10, 1.1999e-11
**
** BOUNDARY CONDITIONS
**
** Name: Clamp Type: Displacement/Rotation
*Boundary
Clamp, 1, 1
Clamp, 2, 2
Clamp, 3, 3
** ----------------------------------------------------------------
**
** STEP: Step-1
**
*Step, name=Step-1, nlgeom=YES
*Dynamic, Explicit
, 0.25
*Bulk Viscosity
0.06, 1.2
**
** BOUNDARY CONDITIONS
**
** Name: Disp Type: Displacement/Rotation
*Boundary, amplitude=Ramp
Disp, 3, 3, -0.0025
**
** OUTPUT REQUESTS
**
*Restart, write, number interval=1, time marks=NO
**
** FIELD OUTPUT: F-Output-1
**
*Output, field, number interval=100
*Node Output
A, RF, U, V
*Element Output, directions=YES
ER, EVF, LE, PE, PEEQ, PEEQVAVG, PEVAVG, S, SVAVG
*Contact Output
CSTRESS,
**
** HISTORY OUTPUT: H-Output-1
**
*Output, history, variable=PRESELECT, time interval=0.0025
*End Step
