*Heading
** Job name: RussellTensile-2 Model name: RussellTensile-2
** Generated by: Abaqus/CAE 2021
*Preprint, echo=NO, model=NO, history=NO, contact=NO
**
** PARTS
**
*Part, name=Gauge
*Node
      1, -0.0250000004, -0.00200000009, 0.00600000005
      2, -0.0250000004, -0.00100000005, 0.00600000005
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*Element, type=C3D8R
   1,   36,   37,   42,   41,    1,    2,    7,    6
   2,   37,   38,   43,   42,    2,    3,    8,    7
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*Nset, nset=Set-1, generate
    1,  1785,     1
*Elset, elset=Set-1, generate
    1,  1200,     1
** Section: Gauge
*Solid Section, elset=Set-1, material=NeoHooke
,
*End Part
**
**
** ASSEMBLY
**
*Assembly, name=Assembly
**
*Instance, name=Gauge-1, part=Gauge
*End Instance
**
*Nset, nset=Disp, instance=Gauge-1, generate
 1751,  1785,     1
*Elset, elset=Disp, instance=Gauge-1, generate
 1177,  1200,     1
*Nset, nset=Fixed, instance=Gauge-1, generate
  1,  35,   1
*Elset, elset=Fixed, instance=Gauge-1, generate
  1,  24,   1
*End Assembly
*Amplitude, name=Amp-1
             0.,              0.,             0.1,              1.
**
** MATERIALS
**
*Material, name=Fibers
*Density
7800.,
*Elastic
 2e+11, 0.3
*Material, name=NeoHooke
*Density
 7.8e+09,
*Hyperelastic, neo hooke
 3.846e+10, 1.1999e-11
**
** BOUNDARY CONDITIONS
**
** Name: Fixed Type: Displacement/Rotation
*Boundary
Fixed, 1, 1
** ----------------------------------------------------------------
**
** STEP: Step-1
**
*Step, name=Step-1, nlgeom=YES
*Dynamic, Explicit
, 0.1
*Bulk Viscosity
0.06, 1.2
**
** BOUNDARY CONDITIONS
**
** Name: Disp Type: Displacement/Rotation
*Boundary, amplitude=Amp-1
Disp, 1, 1, 0.001
**
** OUTPUT REQUESTS
**
*Restart, write, number interval=1, time marks=NO
**
** FIELD OUTPUT: F-Output-1
**
*Output, field, variable=PRESELECT, number interval=100
**
** HISTORY OUTPUT: H-Output-1
**
*Output, history, variable=PRESELECT
*End Step
