*Heading
** Job name: RussellTensile-Half Model name: RussellTensile-1-5_Half
** Generated by: Abaqus/CAE 2021
*Preprint, echo=NO, model=NO, history=NO, contact=NO
**
** PARTS
**
*Part, name=Gauge
*Node
      1, -0.0250000004, -0.00200000009, 0.00600000005
      2, -0.0250000004, -0.00100000005, 0.00600000005
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*Element, type=C3D8R
  1,  31,  32,  37,  36,   1,   2,   7,   6
  2,  32,  33,  38,  37,   2,   3,   8,   7
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*Nset, nset=Set-1, generate
   1,  660,    1
*Elset, elset=Set-1, generate
   1,  420,    1
** Section: Gauge
*Solid Section, elset=Set-1, material=Matrix-NeoHooke
,
*End Part
**
**
** ASSEMBLY
**
*Assembly, name=Assembly
**
*Instance, name=Gauge-1, part=Gauge
*End Instance
**
*Nset, nset=Disp, instance=Gauge-1, generate
 631,  660,    1
*Elset, elset=Disp, instance=Gauge-1, generate
 401,  420,    1
*Nset, nset=Fixed, instance=Gauge-1, generate
  1,  30,   1
*Elset, elset=Fixed, instance=Gauge-1, generate
  1,  20,   1
*Nset, nset=Host, instance=Gauge-1, generate
   1,  660,    1
*Elset, elset=Host, instance=Gauge-1, generate
   1,  420,    1
*Elset, elset=Output, instance=Gauge-1
 181, 182, 183, 184, 185, 186
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*Nset, nset=Outside, instance=Gauge-1
   1,   2,   3,   4,   5,   6
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*Elset, elset=Outside, instance=Gauge-1
   1,   2,   3,   4,   5,   6
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*End Assembly
*Amplitude, name=Amp-1
             0.,              0.,             0.1,              1.
**
** MATERIALS
**
*Material, name=Fibers
*Density
1100.,
*Hyperelastic, neo hooke
 2.1154e+08, 2.182e-09
*Material, name=Matrix-NeoHooke
*Density
1100.,
*Hyperelastic, neo hooke
 2.1154e+08, 2.182e-09
*Material, name=NeoHooke
*Density
 7.8e+09,
*Hyperelastic, neo hooke
 3.846e+10, 1.1999e-11
**
** BOUNDARY CONDITIONS
**
** Name: Fixed Type: Displacement/Rotation
*Boundary
Fixed, 1, 1
** ----------------------------------------------------------------
**
** STEP: Step-1
**
*Step, name=Step-1, nlgeom=YES
*Dynamic, Explicit
, 0.1
*Bulk Viscosity
0.06, 1.2
**
** BOUNDARY CONDITIONS
**
** Name: Disp Type: Displacement/Rotation
*Boundary, amplitude=Amp-1
Disp, 1, 1, 0.0005
**
** OUTPUT REQUESTS
**
*Restart, write, number interval=1, time marks=NO
**
** FIELD OUTPUT: F-Output-1
**
*Output, field, number interval=100
*Node Output
A, RF, U, V
*Element Output, directions=YES
ER, EVF, LE, PE, PEEQ, PEEQVAVG, PEVAVG, S, SVAVG
*Contact Output
CSTRESS,
**
** HISTORY OUTPUT: H-Output-1
**
*Output, history, variable=PRESELECT, time interval=0.001
*End Step
