*Heading
** Job name: JCPlasticity-Rate100 Model name: TensileGauge-Plasticity
** Generated by: Abaqus/CAE 2022
*Preprint, echo=NO, model=NO, history=NO, contact=NO
**
** PARTS
**
*Part, name=Gauge
*Node
      1, -0.0140000004, -0.00200000009, 0.00300000003
      2, -0.0140000004, 0.000500000024, 0.00300000003
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*Element, type=C3D8R
 1,  10,  11,  14,  13,   1,   2,   5,   4
 2,  11,  12,  15,  14,   2,   3,   6,   5
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*Nset, nset=Set-1, generate
   1,  126,    1
*Elset, elset=Set-1, generate
  1,  52,   1
** Section: JC-Plasticity
*Solid Section, elset=Set-1, material=NeoHooke
,
*End Part
**
*Part, name=Fibers0
*Node
      1,     -0.013788,     -0.002000,      0.000212
      2,     -0.013788,      0.003000,      0.000212
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*Element, type=T3D2
1, 1, 2
2, 3, 4
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*Nset, nset=Fib0, internal, generate
1, 140, 1
*Elset, elset=Fib0, internal, generate
1, 71, 1
**Section: TrussSection
*Solid Section, elset=Fib0, material=Fibers
5.674502E-07,
*End Part
**
*Part, name=Fibers90
*Node
      1,     -0.014000,     -0.001788,      0.001062
      2,      0.016000,     -0.001788,      0.001062
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*Element, type=T3D2
1, 1, 2
2, 3, 4
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*Nset, nset=Fib90, internal, generate
1, 24, 1
*Elset, elset=Fib90, internal, generate
1, 13, 1
**Section: TrussSection
*Solid Section, elset=Fib90, material=Fibers
5.674502E-07,
*End Part
**
**
** ASSEMBLY
**
*Assembly, name=Assembly
**
*Instance, name=Gauge-1, part=Gauge
*End Instance
**
*Instance, name=Fibers0, part=Fibers0
0.000000E+00, 0.000000E+00, 0.000000E+00
*End Instance
**
*Instance, name=Fibers90, part=Fibers90
0.000000E+00, 0.000000E+00, 0.000000E+00
*End Instance
*Nset, nset=ALLFIBERS, instance=FIBERS0, generate
1, 140, 1
*Nset, nset=ALLFIBERS, instance=FIBERS90, generate
1, 24, 1
*Elset, elset=ALLFIBERS, instance=FIBERS0, generate
1, 71, 1
*Elset, elset=ALLFIBERS, instance=FIBERS90, generate
1, 13, 1
*Nset, nset=Fixed, instance=Gauge-1, generate
 1,  9,  1
*Elset, elset=Fixed, instance=Gauge-1, generate
 1,  4,  1
*Nset, nset=Outside, instance=Gauge-1
   1,   2,   3,   4,   5,   6
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*Elset, elset=Outside, instance=Gauge-1, generate
  1,  52,   1
*Nset, nset=HOST, instance=Gauge-1, generate
 1, 126, 1
*Elset, elset=HOST, instance=Gauge-1, generate
  1,  52,   1
*Nset, nset=Velocity, instance=Gauge-1, generate
 118,  126,    1
*Elset, elset=Velocity, instance=Gauge-1, generate
 49,  52,   1
** Constraint: Embed-1
*Embedded Element, host elset=HOST
ALLFIBERS
*End Assembly
*Amplitude, name=Ramp
             0.,              0.,             0.1,              1.
**
** MATERIALS
**
*Material, name=Fibers
*Density
981.,
*Elastic
 2e+11, 0.3
*Material, name=NeoHooke
*Density
 7.8e+09,
*Hyperelastic, neo hooke
 3.846e+10, 1.1999e-11
**
** BOUNDARY CONDITIONS
**
** Name: Fixed Type: Displacement/Rotation
*Boundary
Fixed, 1, 1
** ----------------------------------------------------------------
**
** STEP: Step-1
**
*Step, name=Step-1, nlgeom=YES
*Dynamic, Explicit
, 0.1
*Bulk Viscosity
0.06, 1.2
**
** BOUNDARY CONDITIONS
**
** Name: Disp Type: Displacement/Rotation
*Boundary, amplitude=Ramp
Velocity, 1, 1, 0.3
**
** OUTPUT REQUESTS
**
*Restart, write, number interval=1, time marks=NO
**
** FIELD OUTPUT: F-Output-1
**
*Output, field, number interval=100
*Node Output
A, RF, U, V
*Element Output, directions=YES
CFAILURE, DMICRT, ER, EVF, LE, PE, PEEQ, PEEQVAVG, PEVAVG, S, SDEG, SVAVG
*Contact Output
CSTRESS,
**
** HISTORY OUTPUT: H-Output-1
**
*Output, history, variable=PRESELECT
*End Step
