*Heading
** Job name: KarthikeyanPlate_cae Model name: KarthikeyanPlate
** Generated by: Abaqus/CAE 2021
*Preprint, echo=NO, model=NO, history=NO, contact=NO
**
** PARTS
**
*Part, name=SteelProjectile
*Node
      1, 0.00347516732, -0.00243355986, 0.00347516732
      2,           0., 0.00793750025,           0.
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*Element, type=C3D8R
   1,  149,  129,  130,  150, 1002,  982,  983, 1003
   2,  129,  149,   52,   53,  982, 1002,  509,  510
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*Element, type=C3D6
1099,   25,  290, 1143,    3,   26,  606
1100,   24,  291, 1144,   25,  290, 1143
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*Nset, nset=All, generate
    1,  2791,     1
*Elset, elset=All, generate
    1,  2520,     1
*Nset, nset=Set-4, generate
    1,  2791,     1
*Elset, elset=Set-4, generate
    1,  2520,     1
** Region: (Projectile:Set-4), (Controls:EC-2)
*Elset, elset=_I1, internal
    1,    2,    3,    4,    5,    6
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** Section: Projectile
*Solid Section, elset=_I1, controls=EC-2, material=SteelKarth
,
** Region: (Projectile:Set-4), (Controls:Default)
*Elset, elset=_I2, internal
 1099, 1100, 1101, 1102, 1103, 1104
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** Section: Projectile
*Solid Section, elset=_I2, material=SteelKarth
,
*End Part
**
*Part, name=Fibers0
*Node
      1,     -0.074866,      0.000000,      0.000134
      2,     -0.074866,      0.003846,      0.000134
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*Element, type=T3D2
1, 1, 2
2, 3, 4
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*Nset, nset=Fib0, internal, generate
1, 10557, 1
*Elset, elset=Fib0, internal, generate
1, 9721, 1
**Section: TrussSection
*Solid Section, elset=Fib0, material=Fibers
2.269801E-07,
*End Part
**
*Part, name=Fibers90
*Node
      1,     -0.073077,      0.000134,      0.001138
      2,     -0.068205,      0.000134,      0.001138
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*Element, type=T3D2
1, 1, 2
2, 2, 3
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*Nset, nset=Fib90, internal, generate
1, 10560, 1
*Elset, elset=Fib90, internal, generate
1, 9724, 1
**Section: TrussSection
*Solid Section, elset=Fib90, material=Fibers
2.269801E-07,
*End Part
**
*Part, name=TargetPlate
*Node
      1, -0.0500000007,           0., 0.00600000005
      2, -0.0199999996,           0., 0.00600000005
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*Element, type=C3D8R
   1,  168, 1140, 2503,  890,    1,   17,  340,   74
   2, 1140, 1141, 2504, 2503,   17,   18,  341,  340
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*Nset, nset=_PickedSet103, internal, generate
    1,  6097,     1
*Elset, elset=_PickedSet103, internal, generate
    1,  4914,     1
*Orientation, name=Ori-1
1., 0., 0., 0., 1., 0.
1, 0.
** Section: Matrix
*Solid Section, elset=_PickedSet103, orientation=Ori-1, controls=EC-1, material=Matrix-Iso
,
*End Part
**
**
** ASSEMBLY
**
*Assembly, name=Assembly
**
*Instance, name=TargetPlate-1, part=TargetPlate
*End Instance
**
*Instance, name=Fibers0, part=Fibers0
0.000000E+00, 0.000000E+00, 0.000000E+00
*End Instance
**
*Instance, name=Fibers90, part=Fibers90
0.000000E+00, 0.000000E+00, 0.000000E+00
*End Instance
*Nset, nset=ALLFIBERS, instance=FIBERS0, generate
1, 10557, 1
*Nset, nset=ALLFIBERS, instance=FIBERS90, generate
1, 10560, 1
*Elset, elset=ALLFIBERS, instance=FIBERS0, generate
1, 9721, 1
*Elset, elset=ALLFIBERS, instance=FIBERS90, generate
1, 9724, 1
**
*Instance, name=SteelProjectile-1, part=SteelProjectile
          0.,           0.,     0.014138
          0.,           0.,     0.014138, -0.577350279552042, -0.577350279552042, 0.591488279552042, 119.999999109416
*End Instance
**
*Nset, nset=AllOutside, instance=TargetPlate-1
    1,    2,    3,    4,    5,    6
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*Elset, elset=AllOutside, instance=TargetPlate-1
    1,    2,    3,    4,    5,    6
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*Nset, nset=Clamp, instance=TargetPlate-1
    1,    5,    6,    9,   10,   13
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*Elset, elset=Clamp, instance=TargetPlate-1
 3355, 3356, 3357, 3358, 3359, 3360
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*Nset, nset=HOST, instance=TargetPlate-1, generate
    1,  6097,     1
*Elset, elset=HOST, instance=TargetPlate-1, generate
    1,  4914,     1
*Nset, nset=Observe, instance=TargetPlate-1
    1,    2,    3,    4,    5,    6
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*Elset, elset=Observe, instance=TargetPlate-1, generate
    1,  3354,     1
*Nset, nset=SymmX, instance=TargetPlate-1
    4,    6,    8,    9,   11,   12
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*Nset, nset=SymmX, instance=SteelProjectile-1
   2,   3,   5,   6,   7,   8
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*Nset, nset=Symmy, instance=TargetPlate-1
    1,    2,    7,   10,   11,   12
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*Nset, nset=Symmy, instance=SteelProjectile-1
   2,   3,   4,   6,   7,   8
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*Elset, elset=_ALLCONT_S1, internal, instance=TargetPlate-1, generate
 4655,  4914,     1
*Elset, elset=_ALLCONT_S1, internal, instance=SteelProjectile-1
    1,    2,    3,    4,    5,    6
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*Elset, elset=_ALLCONT_S6, internal, instance=TargetPlate-1
    1,   13,   25,   37,   49,   61
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*Elset, elset=_ALLCONT_S6, internal, instance=SteelProjectile-1
   11,   23,   26,   27,   28,   29
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*Elset, elset=_ALLCONT_S2, internal, instance=TargetPlate-1
    1,    2,    3,    4,    5,    6
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*Elset, elset=_ALLCONT_S2, internal, instance=SteelProjectile-1
  916,  917,  918,  919,  920,  921
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*Elset, elset=_ALLCONT_S5, internal, instance=TargetPlate-1
 3589, 3590, 3591, 3592, 3593, 3594
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*Elset, elset=_ALLCONT_S5, internal, instance=SteelProjectile-1
    2,   37,   38,   42,  185,  220
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*Elset, elset=_ALLCONT_S4, internal, instance=TargetPlate-1, generate
 3380,  4914,    26
*Elset, elset=_ALLCONT_S4, internal, instance=SteelProjectile-1
    7,   25,   46,   53,   57,   61
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*Elset, elset=_ALLCONT_S3, internal, instance=TargetPlate-1
 3355, 3356, 3357, 3358, 3359, 3360
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*Elset, elset=_ALLCONT_S3, internal, instance=SteelProjectile-1
   39,   44,  222,  227,  405,  410
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*Surface, type=ELEMENT, name=ALLCONT
_ALLCONT_S1, S1
_ALLCONT_S6, S6
_ALLCONT_S2, S2
_ALLCONT_S4, S4
_ALLCONT_S5, S5
_ALLCONT_S3, S3
** Constraint: Embed-1
*Embedded Element, host elset=HOST
ALLFIBERS
*End Assembly
**
** ELEMENT CONTROLS
**
*Section Controls, name=EC-1, ELEMENT DELETION=YES, MAX DEGRADATION=0.05
1., 1., 1.
*Section Controls, name=EC-2, ELEMENT DELETION=YES
1., 1., 1.
**
** MATERIALS
**
*Material, name=FIBERS_Fail
*Damage Initiation, criterion=DUCTILE
 0.03,   0., 0.01
*Damage Evolution, type=ENERGY
1.,
*Density
981.,
*Elastic
 2e+08, 0.3
*Plastic
 2.5e+09,0.
*Rate Dependent
1., 0.08
*Material, name=Fibers
*Density
981.,
*Elastic
 2e+08, 0.3
*Material, name=HardSteel
*Density
8000.,
*Elastic
 4e+11, 0.3
*Material, name=Matrix
*Density
308.,
*Elastic, type=ORTHOTROPIC
 4.2e+10, 2.4e+09, 4.2e+10, 2.7e+09, 2.7e+09, 4.6e+09,   4e+08,   4e+08
   9e+08,
*Material, name=Matrix-Iso
*Density
308.,
*Elastic, type=ORTHOTROPIC
 4.6e+10, 2.4e+09, 4.6e+10, 2.4e+09, 2.4e+09, 4.6e+09,   9e+08,   9e+08
   9e+08,
*Material, name=Polyurethane
*Density
980.,
*Elastic
 5.0776e+06,0.
*Plastic
     611343.,        0.
     663262., 0.0101742
     708155., 0.0198202
     753051., 0.0302479
     797940., 0.0419179
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 4.65812e+06,   5.06485
** Properties from Matweb: AISI Type M50 Tool Steel
*Material, name=SteelKarth
*Damage Initiation, criterion=DUCTILE
 0.198, 0.33333,  0.0002
*Damage Evolution, type=ENERGY
201000.,
*Density
 7738.7,
*Elastic
 2.034e+11, 0.3
*Plastic
 1.894e+09,0.
**
** INTERACTION PROPERTIES
**
*Surface Interaction, name=IntProp-1
*Friction
 0.42,
**
** BOUNDARY CONDITIONS
**
** Name: Clamp Type: Symmetry/Antisymmetry/Encastre
*Boundary
Clamp, ENCASTRE
** Name: SymmX Type: Symmetry/Antisymmetry/Encastre
*Boundary
SymmX, XSYMM
** Name: Symmy Type: Symmetry/Antisymmetry/Encastre
*Boundary
Symmy, YSYMM
**
** PREDEFINED FIELDS
**
** Name: ProjectileVel   Type: Velocity
*Initial Conditions, type=VELOCITY
SteelProjectile-1.All, 1, 0.
SteelProjectile-1.All, 2, 0.
SteelProjectile-1.All, 3, -250.
** ----------------------------------------------------------------
**
** STEP: Step-1
**
*Step, name=Step-1, nlgeom=YES
*Dynamic, Explicit
, 0.00019
*Bulk Viscosity
0.06, 1.2
**
** INTERACTIONS
**
** Interaction: GeneralContact
*Contact, op=NEW
*Contact Inclusions
ALLCONT ,
*Contact Property Assignment
 ,  , IntProp-1
**
** OUTPUT REQUESTS
**
*Restart, write, number interval=1, time marks=NO
**
** FIELD OUTPUT: F-Output-1
**
*Output, field, number interval=200
*Node Output
A, U, V
*Element Output, directions=YES
CFAILURE, DMICRT, ER, LE, MISES, PE, PEEQ, S, SDEG, SEQUT, STATUS
*Contact Output
CSTRESS,
**
** HISTORY OUTPUT: H-Output-1
**
*Output, history, variable=PRESELECT
*End Step
