*Heading
** Job name: SmallTension_Speed Model name: SmallTension
** Generated by: Abaqus/CAE 2022
*Preprint, echo=NO, model=NO, history=NO, contact=NO
**
** PARTS
**
*Part, name=Part-1
*Node
      1, 0.00499999989, 0.00720849726, 0.00300000003
      2, 0.00249999994, 0.00720849726, 0.00300000003
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*Element, type=C3D8R
 1, 28, 29, 38, 37,  1,  2, 11, 10
 2, 29, 30, 39, 38,  2,  3, 12, 11
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*Nset, nset=Set-5, generate
  1,  81,   1
*Elset, elset=Set-5, generate
  1,  32,   1
** Section: NeoHooke
*Solid Section, elset=Set-5, material=NeoHooke
,
*End Part
**
*Part, name=Fibers0
*Node
      1,     -0.014665,      0.007522,      0.000335
      2,     -0.014665,      0.010208,      0.000335
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*Element, type=T3D2
1, 1, 2
2, 3, 4
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*Nset, nset=Fib0, internal, generate
1, 30, 1
*Elset, elset=Fib0, internal, generate
1, 16, 1
**Section: TrussSection
*Solid Section, elset=Fib0, material=Fibers
1.407276E-06,
*End Part
**
*Part, name=Fibers90
*Node
      1,     -0.015000,      0.008366,      0.001673
      2,     -0.012500,      0.008366,      0.001673
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*Element, type=T3D2
1, 1, 2
2, 2, 3
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*Nset, nset=Fib90, internal, generate
1, 18, 1
*Elset, elset=Fib90, internal, generate
1, 17, 1
**Section: TrussSection
*Solid Section, elset=Fib90, material=Fibers
1.407276E-06,
*End Part
**
**
** ASSEMBLY
**
*Assembly, name=Assembly
**
*Instance, name=Part-1-1, part=Part-1
*End Instance
**
*Instance, name=Fibers0, part=Fibers0
0.000000E+00, 0.000000E+00, 0.000000E+00
*End Instance
**
*Instance, name=Fibers90, part=Fibers90
0.000000E+00, 0.000000E+00, 0.000000E+00
*End Instance
*Nset, nset=ALLFIBERS, instance=FIBERS0, generate
1, 30, 1
*Nset, nset=ALLFIBERS, instance=FIBERS90, generate
1, 18, 1
*Elset, elset=ALLFIBERS, instance=FIBERS0, generate
1, 16, 1
*Elset, elset=ALLFIBERS, instance=FIBERS90, generate
1, 17, 1
*Nset, nset=Disp, instance=Part-1-1, generate
  1,  73,   9
*Elset, elset=Disp, instance=Part-1-1, generate
  1,  25,   8
*Nset, nset=Fix, instance=Part-1-1, generate
  9,  81,   9
*Elset, elset=Fix, instance=Part-1-1, generate
  8,  32,   8
*Nset, nset=HOST, instance=Part-1-1, generate
  1,  81,   1
*Elset, elset=HOST, instance=Part-1-1, generate
  1,  32,   1
*Nset, nset=Outside, instance=Part-1-1
  1,  2,  3,  4,  5,  6
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*Elset, elset=Outside, instance=Part-1-1, generate
  1,  32,   1
** Constraint: Embed-1
*Embedded Element, host elset=HOST
ALLFIBERS
*End Assembly
*Amplitude, name=Amp-1
             0.,              0.,              1.,              1.
**
** MATERIALS
**
*Material, name=FIBERS
*Density
981.,
*Elastic
 2e+08, 0.3
*Material, name=NeoHooke
*Density
7800.,
*Hyperelastic, neo hooke
 3.846e+10, 1.1999e-11
**
** BOUNDARY CONDITIONS
**
** Name: Fix Type: Displacement/Rotation
*Boundary
Fix, 1, 1
** ----------------------------------------------------------------
**
** STEP: Step-1
**
*Step, name=Step-1, nlgeom=YES
*Dynamic, Explicit
, 0.75,, 0.1
*Bulk Viscosity
0.06, 1.2
**
** BOUNDARY CONDITIONS
**
** Name: Disp Type: Velocity/Angular velocity
*Boundary, type=VELOCITY
Disp, 1, 1, 0.003
**
** OUTPUT REQUESTS
**
*Restart, write, number interval=1, time marks=NO
**
** FIELD OUTPUT: F-Output-1
**
*Output, field, number interval=50
*Node Output
A, RF, U, V
*Element Output, directions=YES
DMICRT, ER, EVF, LE, PE, PEEQ, PEEQVAVG, PEVAVG, S, SDEG, STATUS, SVAVG
*Contact Output
CSTRESS,
**
** HISTORY OUTPUT: H-Output-1
**
*Output, history, variable=PRESELECT
*End Step
